*Heading
** Job name: Job-Rec Model name: Model-Rect
** Generated by: Abaqus/CAE 2017
*Preprint, echo=NO, model=NO, history=NO, contact=NO
**
** PARTS
**
*Part, name=Part-1
*Node
      1,           0.,           0.
      2,  0.100000001,           0.
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*Element, type=CPS4R
    1,     1,     2,   103,   102
    2,     2,     3,   104,   103
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*Nset, nset=Set-1, generate
     1,  10201,      1
*Elset, elset=Set-1, generate
     1,  10000,      1
** Section: Section-2
*Solid Section, elset=Set-1, material=Material-1
1.,
*End Part
**
**
** ASSEMBLY
**
*Assembly, name=Assembly
**
*Instance, name=Part-1-1, part=Part-1
*End Instance
**
*Nset, nset=Set-1, instance=Part-1-1, generate
     1,  10101,    101
*Elset, elset=Set-1, instance=Part-1-1, generate
    1,  9901,   100
*Nset, nset=Set-2, instance=Part-1-1, generate
   1,  101,    1
*Elset, elset=Set-2, instance=Part-1-1, generate
   1,  100,    1
*Elset, elset=_Surf-1_S2, internal, instance=Part-1-1, generate
   100,  10000,    100
*Surface, type=ELEMENT, name=Surf-1
_Surf-1_S2, S2
*End Assembly
**
** MATERIALS
**
*Material, name=Material-1
*Density
 2.7e-09,
*Elastic
70., 0.3
**
** BOUNDARY CONDITIONS
**
** Name: BC-1 Type: Symmetry/Antisymmetry/Encastre
*Boundary
Set-1, XSYMM
** Name: BC-2 Type: Symmetry/Antisymmetry/Encastre
*Boundary
Set-2, YSYMM
** ----------------------------------------------------------------
**
** STEP: Step-1
**
*Step, name=Step-1, nlgeom=YES
*Static
1., 1., 1e-05, 1.
**
** LOADS
**
** Name: Load-1   Type: Pressure Using Field: AnalyticalField-1
*Dload
Part-1-1.100, P2, -0.999969
Part-1-1.200, P2, -0.999722
Part-1-1.300, P2, -0.999229
Part-1-1.400, P2, -0.998489
Part-1-1.500, P2, -0.997503
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Part-1-1.10000, P2, -0.00790002
**
** OUTPUT REQUESTS
**
*Restart, write, frequency=0
**
** FIELD OUTPUT: F-Output-1
**
*Output, field, variable=PRESELECT
**
** HISTORY OUTPUT: H-Output-1
**
*Output, history, variable=PRESELECT
*End Step
