*Heading
** Job name: Job-CH-Tension Model name: Model-CH
** Generated by: Abaqus/CAE 2017
*Preprint, echo=NO, model=NO, history=NO, contact=NO
**
** PARTS
**
*Part, name=Part-1
*Node
      1,   9.80246925,           0.
      2,   9.60493851,           0.
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*Element, type=CPS4R
    1,   174,  2483,   222,  2911
    2,  2923,  2911,   222,  2953
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*Nset, nset=Set-1, generate
     1,  12324,      1
*Elset, elset=Set-1, generate
     1,  12127,      1
** Section: Section-2
*Solid Section, elset=Set-1, material=Material-1
1.,
*End Part
**
**
** ASSEMBLY
**
*Assembly, name=Assembly
**
*Instance, name=Part-1-1, part=Part-1
*End Instance
**
*Nset, nset=Set-1, instance=Part-1-1
  135,  136,  137,  138,  139,  140
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*Elset, elset=Set-1, instance=Part-1-1
  121, 1235, 1240, 1249, 1250, 1251
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*Nset, nset=Set-2, instance=Part-1-1
    1,    2,    3,    4,    5,    6
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*Elset, elset=Set-2, instance=Part-1-1
  159,  161,  162,  163,  165,  166
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*Elset, elset=_Surf-1_S1, internal, instance=Part-1-1
   36,   38,   40,  160,  196,  238
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*Elset, elset=_Surf-1_S4, internal, instance=Part-1-1
 159,
*Elset, elset=_Surf-1_S3, internal, instance=Part-1-1
 1054, 1088, 1120, 1149, 1173, 1231
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*Surface, type=ELEMENT, name=Surf-1
_Surf-1_S1, S1
_Surf-1_S4, S4
_Surf-1_S3, S3
*End Assembly
**
** MATERIALS
**
*Material, name=Material-1
*Density
 2.7e-09,
*Elastic
70., 0.3
**
** BOUNDARY CONDITIONS
**
** Name: BC-1 Type: Symmetry/Antisymmetry/Encastre
*Boundary
Set-1, XSYMM
** ----------------------------------------------------------------
**
** STEP: Step-1
**
*Step, name=Step-1, nlgeom=YES
*Static
1., 1., 1e-05, 1.
**
** BOUNDARY CONDITIONS
**
** Name: BC-2 Type: Symmetry/Antisymmetry/Encastre
*Boundary
Set-2, YSYMM
**
** LOADS
**
** Name: Load-1   Type: Pressure
*Dsload
Surf-1, P, -1.
**
** OUTPUT REQUESTS
**
*Restart, write, frequency=0
**
** FIELD OUTPUT: F-Output-1
**
*Output, field, variable=PRESELECT
**
** HISTORY OUTPUT: H-Output-1
**
*Output, history, variable=PRESELECT
*End Step
