*Heading
** Job name: Job-Plate-deflection Model name: Model-1
** Generated by: Abaqus/CAE 2017
*Preprint, echo=NO, model=NO, history=NO, contact=NO
**
** PARTS
**
*Part, name=Part-1
*Node
      1,          50.,          50.,           0.
      2,          49.,          50.,           0.
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*Element, type=S8R5
    1,     1,     2,   103,   102, 10202, 10203, 10204, 10205
    2,     2,     3,   104,   103, 10206, 10207, 10208, 10203
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*Nset, nset=Set-1, generate
     1,  30401,      1
*Elset, elset=Set-1, generate
     1,  10000,      1
** Section: Section-1
*Shell Section, elset=Set-1, material=Material-1
0.1, 3
*End Part
**
**
** ASSEMBLY
**
*Assembly, name=Assembly
**
*Instance, name=Part-1-1, part=Part-1
*End Instance
**
*Nset, nset=Set-1, instance=Part-1-1
     1,     2,     3,     4,     5,     6
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*Elset, elset=Set-1, instance=Part-1-1
     1,     2,     3,     4,     5,     6
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*Elset, elset=_Surf-1_SPOS, internal, instance=Part-1-1, generate
     1,  10000,      1
*Surface, type=ELEMENT, name=Surf-1
_Surf-1_SPOS, SPOS
*End Assembly
**
** MATERIALS
**
*Material, name=Material-1
*Density
 2.7e-06,
*Elastic
70., 0.3
**
** BOUNDARY CONDITIONS
**
** Name: BC-1 Type: Symmetry/Antisymmetry/Encastre
*Boundary
Set-1, ENCASTRE
** ----------------------------------------------------------------
**
** STEP: Step-1
**
*Step, name=Step-1, nlgeom=YES
*Static
1e-07, 1., 1e-08, 1.
**
** LOADS
**
** Name: Load-1   Type: Pressure
*Dsload
Surf-1, P, 1e-05
**
** OUTPUT REQUESTS
**
*Restart, write, frequency=0
**
** FIELD OUTPUT: F-Output-1
**
*Output, field, variable=PRESELECT
**
** HISTORY OUTPUT: H-Output-1
**
*Output, history, variable=PRESELECT
*End Step
