*Heading
** Job name: Job-Buckling-SSFF-1 Model name: Model-buckling-SSFF-1
** Generated by: Abaqus/CAE 2017
*Preprint, echo=NO, model=NO, history=NO, contact=NO
**
** PARTS
**
*Part, name=Part-1
*Node
      1,          50.,          50.,           0.
      2,          49.,          50.,           0.
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*Element, type=S4R
    1,     1,     2,   103,   102
    2,     2,     3,   104,   103
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*Nset, nset=Set-1, generate
     1,  10201,      1
*Elset, elset=Set-1, generate
     1,  10000,      1
** Section: Section-1
*Shell Section, elset=Set-1, material=Material-1
0.1, 5
*End Part
**
**
** ASSEMBLY
**
*Assembly, name=Assembly
**
*Instance, name=Part-1-1, part=Part-1
*End Instance
**
*Nset, nset=Set-1, instance=Part-1-1
     1,     2,     3,     4,     5,     6
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*Elset, elset=Set-1, instance=Part-1-1
     1,     2,     3,     4,     5,     6
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*Nset, nset=Set-2, instance=Part-1-1, generate
   101,  10201,    101
*Elset, elset=Set-2, instance=Part-1-1, generate
   100,  10000,    100
*Nset, nset=Set-3, instance=Part-1-1, generate
     1,  10101,    101
*Elset, elset=Set-3, instance=Part-1-1, generate
    1,  9901,   100
*Nset, nset=Set-Bottom, instance=Part-1-1, generate
 10101,  10201,      1
*Elset, elset=Set-Bottom, instance=Part-1-1, generate
  9901,  10000,      1
*Nset, nset=Set-MoveY, instance=Part-1-1, generate
   101,  10201,    101
*Elset, elset=Set-MoveY, instance=Part-1-1, generate
   100,  10000,    100
*Nset, nset=Set-SymY, instance=Part-1-1, generate
   2,  101,    1
*Elset, elset=Set-SymY, instance=Part-1-1, generate
   1,  100,    1
*Nset, nset=Set-Vetex, instance=Part-1-1
 10101,
*Elset, elset=_Surf-1_SPOS, internal, instance=Part-1-1, generate
     1,  10000,      1
*Surface, type=ELEMENT, name=Surf-1
_Surf-1_SPOS, SPOS
*End Assembly
*Amplitude, name=Amp-1, definition=SMOOTH STEP
             0.,              0.,             0.5,              1.,              1.,              1.
**
** MATERIALS
**
*Material, name=Material-1
*Density
 2.7e-06,
*Elastic
70., 0.3
**
** BOUNDARY CONDITIONS
**
** Name: BC-Left Type: Displacement/Rotation
*Boundary
Set-2, 1, 1
Set-2, 2, 2
Set-2, 3, 3
Set-2, 4, 4
Set-2, 5, 5
Set-2, 6, 6
** Name: BC-Right Type: Displacement/Rotation
*Boundary
Set-3, 1, 1
Set-3, 2, 2
Set-3, 3, 3
Set-3, 4, 4
Set-3, 5, 5
Set-3, 6, 6
** ----------------------------------------------------------------
*Imperfection, file=Job-buckling-SSFF-0, step=1
1, 0.005
**
** STEP: Step-2
**
*Step, name=Step-2, nlgeom=YES, inc=200
*Static, direct, riks
0.01, 1., , , , Set-Vetex, 1, -1.
**
** BOUNDARY CONDITIONS
**
** Name: BC-Left Type: Displacement/Rotation
*Boundary, op=NEW
Set-2, 1, 1
Set-2, 3, 3
Set-2, 5, 5
** Name: BC-Right Type: Displacement/Rotation
*Boundary, op=NEW
Set-3, 1, 1, -1.
Set-3, 3, 3
Set-3, 5, 5
**
** OUTPUT REQUESTS
**
*Restart, write, frequency=0
** FIELD OUTPUT: F-Output-2
*Output, field, variable=PRESELECT
**
** HISTORY OUTPUT: H-Output-2
**
*Output, history, variable=PRESELECT
*End Step
